// COMSOL Multiphysics 6.1.0.357 model "std1_result.mph"
// Outline of the model tree

Parameters
  dMe = 0.72e-5[cm^2/s]  // Diffusion coefficient, Me2+. Ref 1
  dNa = 1.334e-5[cm^2/s]  // Diffusion coefficient, Na+. Ref 1
  dCl = 2.032e-5[cm^2/s]  // Diffusion coefficient, Cl-. Ref 1
  zMe = 2.2  // Charge number of Metal/ Alloys
  zNa = 1  // Charge number of Na+
  zCl = -1  // Charge number of Cl-
  T = 298.15[K]  // Temperature
  i_o_Me = 0.1[mA/cm^2]  // Corrosion current density in the pit solution at Ecorr, close to value in Ref 2 & 1Dpit_transient_factor file
  Ecorr = -350[mV]  // Open-circuit corrosion potential in the pit solution. Ref 2
  Aa = 100[mV]  // Anodic Tafel's slope. Ref 2
  M_Me = 56 [g/mol]  // Molar mass of ss. Ref 2
  rho_Me = 8 [g/cm^3]  // Density of ss. Ref 2
  Csat = 4000[mol/m^3]  // Saturated concentration of metal ions at the pit bottom. Ref 2-3
  alpha_crit = 0.7  // Critical ratio for pit propagation, C_Me/Csat
  Cbulk = 1000[mol/m^3]  // Bulk NaCl concentration
  cCl0 = Cbulk  // Initial concentration, Cl-
  cMe0 = 0.01[mol/m^3]  // Initial concentration, Me z+
  cNa0 = -(zCl*cCl0+zMe*cMe0)/zNa  // Initial concentration, Na+ (from electroneutrality calculation)
  phis0 = 0[V]  // Initial electric potential
  phil0 = 0[V]  // Initial electrolyte potential
  phil_bulk = 0[V]  // Measured electrolyte potential at the bulk
  V_apply = 0.3[V]  // Applied potential for potentiostatic simulation
  I_apply = 1.0E-4  // Applied current for galvanostatic simulation
  ilim_a = 3*10^2[A/cm^2]  // Limiting current density for the anode
  width = 200e-6[m]  // Width of the simulating domain
  height_electrolyte = 100e-6[m]  // Height of the electrolytic domain
  height_electrode = 50e-6[m]  // Height of the pseudo-phase domain
  height_boundary_layer = 0.01[mm]  // Height of boundary layer above the pit mouth, 10 micron
  rpit = 8.000000000000001E-6  // Radius of the pit
  theta = 0.2617993877991494  // Degree for pit openness
  fillet_radius = 0.1e-6[m]  // Radius of the fillet at the pit mouth
  a = 0.001  // factor for f_activate1, control the steepnest of the function,ref 1Dpit_transient_factor file
  b = 12  // factor for f_activate1, control the multiplication factor,ref 1Dpit_transient_factor file
  sigma_pf = 10[J/m^2]  // interfacial tension for pf model. Ref 4
  dz = 10e-6[m]  // assuming thickness in z direction
  b2 = 12  // factor for f_activate2, control the steepnest of the function,ref 1Dpit_transient_factor file
  dummy = 1  // dummy
  stepzone = 0.25

Functions
  step1: Step | location = 0.5; smooth = stepzone
  step2: Step "f_activate2" | funcname = f_activate2; location = 0.7; from = 1e-2; to = b2

Variables
  var1 "Variables 1: pit kinetics"
    Vn = tcd.iloc_per1*M_Me/zMe/F_const/rho_Me  // Dissolving velocity
    i0_factivate1 = i_o_Me*f_activate1  // c.d with sigmoid function f_activate1
    alpha = cMe/Csat
    f_activate1 = ((alpha-alpha_crit)*0.5/sqrt(a+(alpha-alpha_crit)^2)+0.5)*b  // Sigmoid function fa1 for repassivation
    i0_study2 = i_o_Me*f_activate2(alpha)  // i0 with sigmoid function f_activate2 from Comsol
  var2 "Variables Study 1"
    i0 = i_o_Me  // i0 for steady state 1
    epsl = max(step1(pf.Vf2),1e-2)
  var3 "Variables Study 2"
    i0 = i_o_Me*f_activate2(alpha)  // i0 for steady state 1
    epsl = max(step1(pf.Vf2),1e-2)  // Electrolyte volume fraction with added step function for high applied current
  var4 "Variables Study 3"
    i0 = i_o_Me*f_activate2(alpha)  // i0 for steady state 1
    epsl = max(pf.Vf2,1e-3)  // Electrolyte volume fraction for low applied current

Geometry
  geom1 "Geometry 1" (2D, length unit m)
    r1: Rectangle "Rectangle 1: electrolyte phase" | pos = {-width/2, 0}; size = {width, height_electrolyte}
    r2: Rectangle "Rectangle 2: pseudo-phase" | pos = {-width/2, -height_electrode}; size = {width, height_electrode}
    e1: Ellipse "Ellipse 1: Single pit" | pos = {0, -cos(theta)*rpit}; semiaxes = {rpit, rpit}
    e2: Ellipse "Ellipse 2: pit 2_right" (disabled)
      pos = {dpit_pos+rpit_pos, -cos(theta_pos)*rpit_pos}
      semiaxes = {rpit_pos, rpit_pos}
    uni1: Union | input = e1, e2, r1; intbnd = off; edge = all
    fil1: Fillet | point = uni1(1) points 4, 6; radius = fillet_radius
    int1: Intersection | input = r2, fil1; keep = on; intbnd = off; edge = all
    dif1: Difference | input = r2; input2 = int1
    ls1: LineSegment "Diffusive layer boundary"
      specify1 = coord
      coord1 = {-width/2, height_boundary_layer}
      specify2 = coord
      coord2 = {width/2, height_boundary_layer}
    fin: Finalize "Form Union"

Physics
  tcd: TertiaryCurrentDistributionNernstPlanck on all domains
    dependent variable cMe = {cMe, cNa, cCl}
    dz.dz = dz
    SpeciesProperties.FromElectroneutrality = 3
    sp1: SpeciesProperties "Species Charges" (default)
    ice1: Electrolyte (default)
    nflx1: NoFlux (default)
    ein1: ElectricInsulation "Insulation 1" (default)
    init1: init "Initial Values 1: pseudo-phase" (default) | initc = {Csat, 0, cCl0}; initphil = phil0; initphis = phis0
    init2: init "Initial Values 2: electrolyte phase" on domains 2, 3
      initc = {cMe0, cNa0, cCl0}
      initphil = phil0
      initphis = phis0
    hcpce1: HighlyConductivePorousElectrode on domains 1-3
      epsl = 1
      DiffusionCorrModel = userdef
      fDl = epsl
      BoundaryCondition = TotalCurrent
      phisext0 = V_pol
      Itl = I_apply
      minput_temperature = T
      D_cMe = dMe
      D_cNa = dNa
      D_cCl = dCl
      z = {{zMe}, {zNa}, {zCl}}
      per1: PorousElectrodeReaction (default)
        Vi0 = {-1, 0, 0}
        nm = zMe
        Eeq_mat = userdef
        Eeq = Ecorr
        ElectrolyteSpecies = {c1, c2, c3}
        i0 = i0
        Aa = Aa
        ElectrolyteSpeciesForConcDependence = {c1, c2, c3}
        ElectrodeKinetics = AnodicTafelEquation
        LimitingCurrentDensity = 1
        ilim = ilim_a
        Av = pf.delta
        Viad = 0
    conc1: Concentration "Concentration 1: Bulk" on boundaries 6, 7 | species = {1, 1, 1}; c0 = {cMe0, cNa0, cCl0}
    eip1: ElectrolytePotential "Electrolyte Potential: Bulk" on boundaries 6, 7 | philbnd = phil_bulk
  pf: PhaseField on all domains
    dependent variable phipf
    ShapeProperty.order_phasefield = 2
    pfm1: PhaseFieldModel (default)
      epsilon_pf = pf.hmax/18
      chiOption = velocity
      U = max(Vn,eps)
      u = {-Vn*pf.intnormx, -Vn*pf.intnormy, 0}
      sigma = sigma_pf
    init1: init "Initial Values 1" (default) | FluidInDomain = Fluid2phipf
    initfluid2: initFluid2 "Initial Values, Fluid 2" on domains 1 | FluidInDomain = Fluid1phipf
    ww1: WettedWall (default)
    inl1: InletBoundary "Inlet 1" on boundaries 3, 5-7, 10, 11 | pfcond = Fluid2pf
    out1: Outlet on boundaries 1, 2, 9

Mesh
  mesh1 "Mesh 1"
    size: MeshSizeDefault | table = cfd
    ftri1: FreeTri "Free Triangular 1" on domains 1-3
      size1: Size "Size 1: electrolyte" on domains 1-3 | table = cfd; hauto = 4
      size2: Size "Size 2: electrode" on domains 1, 2 | table = cfd; hgrad = 1.02; hauto = 1; custom = on
    bl1: BndLayer "Boundary Layers 1" (disabled) on entire geometry | sharpcorners = trim
      blp: BndLayerProp "Boundary Layer Properties" on boundaries 4, 8, 12-17
        blnlayers = 2
        blstretch = 1
        blhminfact = 2

Studies
  std4 "Study 1: Establish initial conditions, i0=i0_Me"
    // Notes: this is run with the kinetics: i0 = io_Me*(1-micro), with microstructure
    // boundary condition change with added: boundarr 3,4,8,9,11 for bulk concentration and potential
    param: Parametric "du" | pname = dummy; plistarr = 1.2e-4; useaccumtable = on
    stat: Stationary | solve for = {tcd}; disabledvariables = {var3, var4}; pname = I_apply; plistarr = 1.2e-4
  std3 "Study 2: Transient study, i0 = i0_Me*f_activate2"
    // Notes: this is run with the kinetics: i0 = i_o_Me*f2_activate. No microstructure file information
    // Time dependent run from steadystate solution (I=3A) with I_apply=3.5. Boundary condition is tighten at 3,4,5,9,11 for bulk
    param: Parametric "du2" | pname = dummy; plistarr = 1
    time: Transient "Time Dependent"
      tlist = range(0,0.025,1.0)
      disabledvariables = {var2, var4}
      useinitsol = on
      initmethod = sol
      initstudy = std4
      initsol = current
      pname = I_apply
      plistarr = 11.5e-6
  std5 "Study 3"
    param: Parametric "du3" | pname = dummy; plistarr = 1
    time: Transient "Time Dependent"
      tlist = range(0,0.025,1)
      disabledvariables = {var2, var3}
      useinitsol = on
      initmethod = sol
      initstudy = std4

Solver configurations
  sol4 "Solution 2" (study std3)
    v1: Variables "Dependent Variables 1" | initmethod = sol; scalemethod = init
      comp1_phil: Field "Electrolyte potential (comp1.phil)" | scalemethod = manual; scaleval = 1
      comp1_phipf: Field "Phase field variable (comp1.phipf)" | scalemethod = manual; scaleval = 1
      comp1_tcd_hcpce1_phisext: State "External electric potential (comp1.tcd.hcpce1.phisext)"
        scalemethod = manual
        scaleval = 1
    t1: Time "Time-Dependent Solver 1"
      tlist = range(0,0.025,1.0)
      tout = tstepsclosest
      rtol = 0.001
      maxorder = 2
      stabcntrl = on
      eventout = on
      fc1: FullyCoupled | linsolver = d1; dtech = auto; maxiter = 8
      d1: Direct "Direct, phase field variables (pf) (merged)" | linsolver = pardiso; pivotperturb = 1.0E-13
  sol5 "Solution 1" (study std4)
    v1: Variables "Dependent Variables 1"
      comp1_phil: Field "Electrolyte potential (comp1.phil)" | scalemethod = manual; scaleval = 1
      comp1_tcd_hcpce1_phisext: State "External electric potential (comp1.tcd.hcpce1.phisext)"
        scalemethod = manual
        scaleval = 1
    s1: Stationary "Stationary Solver 1" | stol = 1.0E-4
      fc1: FullyCoupled | linsolver = d1; minstep = 1.0E-6; maxiter = 100
      d1: Direct "Direct (tcd)" | linsolver = pardiso
  sol6 "Parametric Solutions 1" (study std4)
  sol8 "Parametric Solutions 2" (study std4)
  sol9 "Parametric Solutions 3" (study std4)
  sol11 "Parametric Solutions 4" (study std3)
  sol12 "Solution 12" (study std5)
    v1: Variables "Dependent Variables 1"
      comp1_phil: Field "Electrolyte potential (comp1.phil)" | scalemethod = manual; scaleval = 1
      comp1_phipf: Field "Phase field variable (comp1.phipf)" | scalemethod = manual; scaleval = 1
      comp1_tcd_hcpce1_phisext: State "External electric potential (comp1.tcd.hcpce1.phisext)"
        scalemethod = manual
        scaleval = 1
    t1: Time "Time-Dependent Solver 1"
      tlist = range(0,0.025,1)
      rtol = 0.001
      maxorder = 2
      stabcntrl = on
      eventout = on
      fc1: FullyCoupled
        linsolver = d1
        dtech = auto
        maxiter = 8
        damp = 0.9
        jtech = once
        stabacc = aacc
        aaccdim = 5
        aaccmix = 0.9
      d1: Direct "Direct, phase field variables (pf) (merged)" | linsolver = pardiso; pivotperturb = 1.0E-13
  sol13 "Parametric Solutions 5" (study std5)

Datasets
  dset14: Solution | solution = sol5
  dset15: Solution | solution = sol4
  cln1: CutLine2D "Cut Line 2D: centerline x=0" | data = dset15; genpoints = {{0, 10e-6}, {0, -35e-6}}
  dset16: Solution | solution = sol6
  dset17: Solution | solution = sol8
  dset18: Solution | solution = sol9
  dset19: Solution | solution = sol11
  dset20: Solution | solution = sol12
  dset21: Solution | solution = sol13

Derived values
  pev1: EvalPoint "Point Evaluation 1: Test charge neutrality" on points 8, 12
    data = dset15
    table = tbl2
    expr = cMe*zMe+cCl*zCl+cNa*zNa
    unit = mol/m^3
  pev2: EvalPoint "Point Evaluation 2" on points 8 | data = dset14; table = tbl3; expr = cMe; descr = Concentration

Tables
  tbl1: Table
    // Global Evaluation 1: Electrode potential
    I_apply (A) | Time (s) | Electric potential (V)
    9e-06 | 10 | 0.0080951
    9e-06 | 10.1 | 0.021311
    9e-06 | 10.2 | 0.0332161
    9e-06 | 10.3 | 0.0392753
    9e-06 | 10.4 | 0.0429978
    9e-06 | 10.5 | 0.0455665
    9e-06 | 10.6 | 0.0471011
    9e-06 | 10.7 | 0.0482258
    9e-06 | 10.8 | 0.0489441
    9e-06 | 10.9 | 0.0494315
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  tbl2: Table
    // Point Evaluation 1: Test charge neutrality
    I_apply (A) | Time (s) | cMe*zMe+cCl*zCl+cNa*zNa (mol/m^3), Point: 8 | cMe*zMe+cCl*zCl+cNa*zNa (mol/m^3), Point: 12
    1.15e-05 | 0 | -1.42109e-12 | -7.38964e-13
    1.15e-05 | 0.106353 | -2.00373e-12 | -7.38964e-13
    1.15e-05 | 0.21332 | -1.69109e-12 | -9.66338e-13
    1.15e-05 | 0.313155 | -1.93268e-12 | -9.09495e-13
    1.15e-05 | 0.41299 | -1.53477e-12 | -7.38964e-13
    1.15e-05 | 0.512825 | -2.25953e-12 | -8.52651e-13
    1.15e-05 | 0.61266 | -2.24532e-12 | -6.82121e-13
    1.15e-05 | 0.712495 | -2.20268e-12 | -9.09495e-13
    1.15e-05 | 0.81233 | -2.2311e-12 | -8.52651e-13
    1.15e-05 | 0.912165 | -2.07478e-12 | -1.02318e-12
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  tbl3: Table
    rpit | theta | I_apply | dummy | Concentration (mol/m^3), Point: 8
    8e-06 | 0.261799 | 0.0001 | 0.00012 | 4595.3

Plots
  pg22: PlotGroup1D "Study 1: cMe vs x"
    data = none
    filenameintitle = on
    dateintitle = on
    typeintitle = off
    descriptionintitle = off
    unitintitle = off
    lngr7: LineGraph "cMe" | data = dset14; expr = cMe; unit = mol/m^3; xdata = expr; xdataexpr = x
  pg24: PlotGroup2D "volume fraction" | data = dset15
    surf1: Surface | expr = pf.Vf2
      filt1: Filter (disabled) | expr = epsl
  pg32: PlotGroup2D "cMe"
    data = dset15
    solutionintitle = off
    prefixintitle = Concentration Me (M)
    typeintitle = off
    descriptionintitle = off
    unitintitle = off
    surf1: Surface | expr = cMe; unit = M; typeintitle = off; descriptionintitle = off; unitintitle = off
      filt1: Filter | expr = phipf>=-0.15
    surf2: Surface | expr = cMe; unit = M; typeintitle = off; descriptionintitle = off; unitintitle = off
      filt1: Filter | expr = phipf<-0.15
  pg34: PlotGroup2D "cCl" | data = dset15
    surf1: Surface | expr = cCl; unit = M; typeintitle = off
      filt1: Filter | expr = phipf>=-0.15
  pg35: PlotGroup2D "cNa" | data = dset15
    surf1: Surface | expr = cNa; unit = M; typeintitle = off
      filt1: Filter | expr = phipf>=-0.15
  pg36: PlotGroup2D "IR drop" | data = dset15
    surf1: Surface | expr = phil; typeintitle = off
      filt1: Filter | expr = phipf>=-0.15
  pg33: PlotGroup1D "Electrode Potential"
    data = dset15
    typeintitle = off
    descriptionintitle = off
    unitintitle = off
    ylabel = Electrode potential (V)
    glob1: Global | expr = tcd.phis_hcpce1; unit = V; descr = Electric potential
  pg37: PlotGroup1D "Concentration and IR drop along the centerline x=0"
    data = cln1
    yseclabel = Electrolyte potential (V)
    lngr1: LineGraph "cMe" | expr = cMe; unit = M; xdata = expr; xdataexpr = y; autosolution = off; autoexpr = on
      filt1: LineGraphFilter "Filter 1" | expr = phipf>=-0.15
    lngr2: LineGraph "cNa" | expr = cNa; unit = M; xdata = expr; xdataexpr = y; autosolution = off; autoexpr = on
      filt1: LineGraphFilter "Filter 1" | expr = phipf>=-0.15
    lngr3: LineGraph "cCl" | expr = cCl; unit = M; xdata = expr; xdataexpr = y; autosolution = off; autoexpr = on
      filt1: LineGraphFilter "Filter 1" | expr = phipf>=-0.15
    lngr4: LineGraph "IR drop" | expr = phil; xdata = expr; xdataexpr = y; autosolution = off; autoexpr = on
      filt1: LineGraphFilter "Filter 1" | expr = phipf>=-0.15

Exports
  data1: Data
    data = dset15
    expr = {cMe, phil, phipf, tcd.phis_hcpce1, tcd.Itot_hcpce1, tcd.iloc_per1, t}
    unit = {mol/m^3, V, 1, V, A, A/m^2, s}
    descr = {Concentration, Electrolyte potential, Phase field variable, Electric potential, Total current, Local current density, Time}
    filename = /glb/bng/pt.simpl/proj.nobackup/ir7/invmfj/Code/Phase_Field/test/qlog/psweep/comsol_batch/results/single_pit/std2_repass/std2_result.txt
    location = regulargrid
    regulargridx2 = 1000
    regulargridy2 = 750
    sort = on
  tbl1: Table "derval_c2"
    table = tbl3
    filename = /glb/bng/pt.simpl/proj.nobackup/ir7/invmfj/Code/Phase_Field/test/qlog/psweep/comsol_batch/results/single_pit/std1_repass/std1_peval.txt
  data3: Data
    data = dset20
    expr = {cMe, phil, phipf, tcd.phis_hcpce1, tcd.Itot_hcpce1, tcd.iloc_per1, t}
    unit = {mol/m^3, V, 1, V, A, A/m^2, s}
    descr = {Concentration, Electrolyte potential, Phase field variable, Electric potential, Total current, Local current density, Time}
    filename = /glb/bng/pt.simpl/proj.nobackup/ir7/invmfj/Code/Phase_Field/test/qlog/psweep/comsol_batch/results/single_pit/std2_repass/std2_result.txt
    location = regulargrid
    regulargridx2 = 1000
    regulargridy2 = 750
    sort = on